OpenVSP model (file version 5), 9 components.
Geometry view with OpenVSP parameter names; values to 6 digits, angles in degrees, lengths in the model's unit.
Overall bounding box: X_Min=-0.517767 X_Len=30.5778 Y_Min=-20.2573 Y_Len=40.5147 Z_Min=-1.75 Z_Len=5.99742

Fuselage "FuselageGeom"
  location (X Y Z) 0 0 0, rotation 0 0 0
  bounding box size 10.7855 3.37973 3.5
  Design: Length=9.75
  cross sections:
    n  XLocPercent  YLocPercent  ZLocPercent  shape
    0  0            0            0            circle Circle_Diameter=2.5
    1  0.25         0            0            ellipse Ellipse_Height=3.5 Ellipse_Width=3
    2  0.5          0            0            as above
    3  0.75         0            0            as above
    4  1            0            0            circle Circle_Diameter=2.5

Human "HumanGeom", child of "FuselageGeom"
  location (X Y Z) 3.55435 0 -0.652174, rotation 0 31.0326 0
  bounding box size 4.67588 1.9431 3.09136
  mass: Density=68.9874 Shell_Flag=0 Mass_Area=1 Mass_Prior=0
  Anthropometric: Age=30 AutoDensity=1 BMI=27.7 BMI_pct=0.5 GenderFlag=0 LenUnit=4 Mass=212.841 MassUnit=3 SitFrac=0.51 Stature=6.125 Stature_pct=0.926198 Volume=3.08522

Custom "Seat", child of "FuselageGeom"
  location (X Y Z) 3.25 0 -1.5, rotation 0 -90 0
  bounding box size 2.91432 2 2.95892
  Design: BackAngle=27 BackHeight=2.9 BackThick=0.25 SeatHeight=0.25 SeatLength=1.5 Width=2
  custom script Seat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

Human "HumanGeom", child of "FuselageGeom"
  location (X Y Z) 7.05435 0 -0.652174, rotation 0 31.0326 0
  bounding box size 4.12497 1.9431 3.31283
  mass: Density=69.5565 Shell_Flag=0 Mass_Area=1 Mass_Prior=0
  Anthropometric: Age=30 AutoDensity=1 BMI=27.7 BMI_pct=0.5 GenderFlag=0 LenUnit=4 Mass=212.841 MassUnit=3 SitFrac=0.51 Stature=6.125 Stature_pct=0.926198 Volume=3.05998

Custom "Seat", child of "FuselageGeom"
  location (X Y Z) 6.75 0 -1.5, rotation 0 -90 0
  bounding box size 2.91432 2 2.95892
  Design: BackAngle=27 BackHeight=2.9 BackThick=0.25 SeatHeight=0.25 SeatLength=1.5 Width=2
  custom script Seat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

Wing "WingGeom"
  location (X Y Z) 0 0 0, rotation 0 0 0
  symmetric about XZ
  bounding box size 10.7106 40.5147 1.07966
  totals: TotalSpan=40 TotalProjectedSpan=40 TotalChord=7.5 TotalArea=300 TotalAR=5.33333 MAC=7.95796
  root: chord 10.71, twist 0, NACA 4-series Camber=0 CamberLoc=0.2 ThickChord=0.1
  sections:
    n  Span  Root_Chord  Tip_Chord  Area  Sweep  Sweep_Location  Dihedral  Twist  Twist_Location  tip airfoil
    1  20    10.71       4.29       150   0      0.25            0         0      0.25            NACA 4-series Camber=0.0398571 CamberLoc=0.377143 ThickChord=0.121429

Wing "WingGeom"
  location (X Y Z) 23.06 0 0, rotation 0 0 0
  symmetric about XZ
  bounding box size 7.00299 12.4241 0.708876
  totals: TotalSpan=12 TotalProjectedSpan=12 TotalChord=5.69 TotalArea=68.28 TotalAR=2.10896 MAC=5.79053
  root: chord 7, twist 0, NACA 4-series Camber=0 CamberLoc=0.2 ThickChord=0.1
  sections:
    n  Span  Root_Chord  Tip_Chord  Area   Sweep  Sweep_Location  Dihedral  Twist  Twist_Location  tip airfoil
    1  6     7           4.38       34.14  10     0.25            0         0      0.25            as above

Wing "WingGeom"
  location (X Y Z) 23.06 0 0, rotation 90 0 0
  bounding box size 7 0.700406 4.24742
  totals: TotalSpan=4 TotalProjectedSpan=4 TotalChord=6 TotalArea=24 TotalAR=0.666667 MAC=6.05556
  root: chord 7, twist 0, NACA 4-series Camber=0 CamberLoc=0.2 ThickChord=0.1
  sections:
    n  Span  Root_Chord  Tip_Chord  Area  Sweep  Sweep_Location  Dihedral  Twist  Twist_Location  tip airfoil
    1  4     7           5          24    10     0.25            0         0      0.25            as above

Mesh "MeshGeom"
  location (X Y Z) 0 0 0, rotation 0 0 0
  bounding box size 10.7855 3.07736 3.5
  triangle mesh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
